*Heading
** Job name: Job-1 Model name: Job-1
** Generated by: Abaqus/CAE 2022
*Preprint, echo=NO, model=NO, history=NO, contact=NO
**
** PARTS
**
*Part, name=SAMPLE
*Node
      1,         0.75,           0.
      2,         0.75, 0.0773552284
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*Element, type=CPE4
    1,  2628,  2624,  2481,  2627
    2,  2625,  2513,  2624,  2628
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*Elset, elset=SURFACE1, generate
   1,  748,    1
*Elset, elset=SURFACE2, generate
 749,  892,    1
*Elset, elset=SURFACE3, generate
  893,  1180,     1
*Elset, elset=SURFACE4, generate
 1181,  1504,     1
*Elset, elset=SURFACE5, generate
 1505,  1920,     1
*Elset, elset=SURFACE6, generate
 1921,  2096,     1
*Elset, elset=SURFACE7, generate
 2097,  2368,     1
*Elset, elset=SURFACE8, generate
 2369,  2596,     1
*Elset, elset=SURFACE9, generate
 2597,  2840,     1
*Elset, elset=SURFACE10, generate
 2841,  3292,     1
*Elset, elset=SURFACE11, generate
 3293,  3660,     1
*Elset, elset=SURFACE12, generate
 3661,  3772,     1
*Elset, elset=SURFACE13, generate
 3773,  3868,     1
*Elset, elset=SURFACE14, generate
 3869,  4172,     1
*Elset, elset=SURFACE15, generate
 4173,  4528,     1
*Elset, elset=SURFACE16, generate
 4529,  6116,     1
*Elset, elset=SURFACE17, generate
 6117,  6300,     1
*Elset, elset=SURFACE18, generate
 6301,  6448,     1
*Elset, elset=SURFACE19, generate
 6449,  6624,     1
*Elset, elset=SURFACE20, generate
 6625,  7440,     1
*Elset, elset=SURFACE21, generate
 7441,  8000,     1
*Elset, elset=SURFACE22, generate
 8001,  9140,     1
*Elset, elset=SURFACE23, generate
 9141,  9396,     1
*Elset, elset=SURFACE24, generate
 9397,  9860,     1
*Elset, elset=SURFACE25, generate
  9861,  10388,      1
*Elset, elset=SURFACE26, generate
 10389,  10644,      1
*Elset, elset=SURFACE27, generate
 10645,  11412,      1
*Elset, elset=SURFACE28, generate
 11413,  11712,      1
*Elset, elset=SURFACE29, generate
 11713,  12044,      1
*Elset, elset=SURFACE30, generate
 12045,  12236,      1
*Elset, elset=SURFACE31, generate
 12237,  12512,      1
*Elset, elset=SURFACE32, generate
 12513,  12608,      1
*Elset, elset=SURFACE33, generate
 12609,  12892,      1
*Elset, elset=SURFACE34, generate
 12893,  13192,      1
*Elset, elset=SURFACE35, generate
 13193,  13340,      1
*Elset, elset=SURFACE36, generate
 13341,  13464,      1
*Elset, elset=SURFACE37, generate
 13465,  13672,      1
*Elset, elset=SURFACE38, generate
 13673,  13792,      1
*Elset, elset=SURFACE39, generate
 13793,  14160,      1
*Elset, elset=SURFACE40, generate
 14161,  14316,      1
*Elset, elset=SURFACE41, generate
 14317,  14700,      1
*Elset, elset=SURFACE42, generate
 14701,  14844,      1
*Elset, elset=SURFACE43, generate
 14845,  15452,      1
*Elset, elset=SURFACE44, generate
 15453,  15820,      1
*Elset, elset=SURFACE45, generate
 15821,  16080,      1
*Elset, elset=SURFACE46, generate
 16081,  16656,      1
*Elset, elset=SURFACE47, generate
 16657,  17044,      1
*Elset, elset=SURFACE48, generate
 17045,  17260,      1
*Elset, elset=SURFACE49, generate
 17261,  17800,      1
*Elset, elset=SURFACE50, generate
 17801,  18544,      1
*Elset, elset=SURFACE51, generate
 18545,  18716,      1
*Elset, elset=SURFACE52, generate
 18717,  19164,      1
*Elset, elset=SURFACE53, generate
 19165,  19232,      1
*Elset, elset=SURFACE54, generate
 19233,  20156,      1
*Elset, elset=SURFACE55, generate
 20157,  20636,      1
*Elset, elset=SURFACE56, generate
 20637,  20844,      1
*Elset, elset=SURFACE57, generate
 20845,  21148,      1
*Elset, elset=SURFACE58, generate
 21149,  21784,      1
*Elset, elset=SURFACE59, generate
 21785,  22524,      1
*Elset, elset=SURFACE60, generate
 22525,  22732,      1
*Elset, elset=SURFACE61, generate
 22733,  23136,      1
*Elset, elset=SURFACE62, generate
 23137,  23276,      1
*Elset, elset=SURFACE63, generate
 23277,  23640,      1
*Elset, elset=SURFACE64, generate
 23641,  24292,      1
*Elset, elset=SURFACE65, generate
 24293,  25184,      1
*Elset, elset=SURFACE66, generate
 25185,  25340,      1
*Elset, elset=SURFACE67, generate
 25341,  25712,      1
** Section: Section-1-SURFACE1
*Solid Section, elset=SURFACE1, material=MATERIAL-1
,
** Section: Section-2-SURFACE2
*Solid Section, elset=SURFACE2, material=MATERIAL-2
,
** Section: Section-3-SURFACE3
*Solid Section, elset=SURFACE3, material=MATERIAL-3
,
** Section: Section-4-SURFACE4
*Solid Section, elset=SURFACE4, material=MATERIAL-4
,
** Section: Section-5-SURFACE5
*Solid Section, elset=SURFACE5, material=MATERIAL-5
,
** Section: Section-6-SURFACE6
*Solid Section, elset=SURFACE6, material=MATERIAL-6
,
** Section: Section-7-SURFACE7
*Solid Section, elset=SURFACE7, material=MATERIAL-7
,
** Section: Section-8-SURFACE8
*Solid Section, elset=SURFACE8, material=MATERIAL-8
,
** Section: Section-9-SURFACE9
*Solid Section, elset=SURFACE9, material=MATERIAL-9
,
** Section: Section-10-SURFACE10
*Solid Section, elset=SURFACE10, material=MATERIAL-10
,
** Section: Section-11-SURFACE11
*Solid Section, elset=SURFACE11, material=MATERIAL-11
,
** Section: Section-12-SURFACE12
*Solid Section, elset=SURFACE12, material=MATERIAL-12
,
** Section: Section-13-SURFACE13
*Solid Section, elset=SURFACE13, material=MATERIAL-13
,
** Section: Section-14-SURFACE14
*Solid Section, elset=SURFACE14, material=MATERIAL-14
,
** Section: Section-15-SURFACE15
*Solid Section, elset=SURFACE15, material=MATERIAL-15
,
** Section: Section-16-SURFACE16
*Solid Section, elset=SURFACE16, material=MATERIAL-16
,
** Section: Section-17-SURFACE17
*Solid Section, elset=SURFACE17, material=MATERIAL-17
,
** Section: Section-18-SURFACE18
*Solid Section, elset=SURFACE18, material=MATERIAL-18
,
** Section: Section-19-SURFACE19
*Solid Section, elset=SURFACE19, material=MATERIAL-19
,
** Section: Section-20-SURFACE20
*Solid Section, elset=SURFACE20, material=MATERIAL-20
,
** Section: Section-21-SURFACE21
*Solid Section, elset=SURFACE21, material=MATERIAL-21
,
** Section: Section-22-SURFACE22
*Solid Section, elset=SURFACE22, material=MATERIAL-22
,
** Section: Section-23-SURFACE23
*Solid Section, elset=SURFACE23, material=MATERIAL-23
,
** Section: Section-24-SURFACE24
*Solid Section, elset=SURFACE24, material=MATERIAL-24
,
** Section: Section-25-SURFACE25
*Solid Section, elset=SURFACE25, material=MATERIAL-25
,
** Section: Section-26-SURFACE26
*Solid Section, elset=SURFACE26, material=MATERIAL-26
,
** Section: Section-27-SURFACE27
*Solid Section, elset=SURFACE27, material=MATERIAL-27
,
** Section: Section-28-SURFACE28
*Solid Section, elset=SURFACE28, material=MATERIAL-28
,
** Section: Section-29-SURFACE29
*Solid Section, elset=SURFACE29, material=MATERIAL-29
,
** Section: Section-30-SURFACE30
*Solid Section, elset=SURFACE30, material=MATERIAL-30
,
** Section: Section-31-SURFACE31
*Solid Section, elset=SURFACE31, material=MATERIAL-31
,
** Section: Section-32-SURFACE32
*Solid Section, elset=SURFACE32, material=MATERIAL-32
,
** Section: Section-33-SURFACE33
*Solid Section, elset=SURFACE33, material=MATERIAL-33
,
** Section: Section-34-SURFACE34
*Solid Section, elset=SURFACE34, material=MATERIAL-34
,
** Section: Section-35-SURFACE35
*Solid Section, elset=SURFACE35, material=MATERIAL-35
,
** Section: Section-36-SURFACE36
*Solid Section, elset=SURFACE36, material=MATERIAL-36
,
** Section: Section-37-SURFACE37
*Solid Section, elset=SURFACE37, material=MATERIAL-37
,
** Section: Section-38-SURFACE38
*Solid Section, elset=SURFACE38, material=MATERIAL-38
,
** Section: Section-39-SURFACE39
*Solid Section, elset=SURFACE39, material=MATERIAL-39
,
** Section: Section-40-SURFACE40
*Solid Section, elset=SURFACE40, material=MATERIAL-40
,
** Section: Section-41-SURFACE41
*Solid Section, elset=SURFACE41, material=MATERIAL-41
,
** Section: Section-42-SURFACE42
*Solid Section, elset=SURFACE42, material=MATERIAL-42
,
** Section: Section-43-SURFACE43
*Solid Section, elset=SURFACE43, material=MATERIAL-43
,
** Section: Section-44-SURFACE44
*Solid Section, elset=SURFACE44, material=MATERIAL-44
,
** Section: Section-45-SURFACE45
*Solid Section, elset=SURFACE45, material=MATERIAL-45
,
** Section: Section-46-SURFACE46
*Solid Section, elset=SURFACE46, material=MATERIAL-46
,
** Section: Section-47-SURFACE47
*Solid Section, elset=SURFACE47, material=MATERIAL-47
,
** Section: Section-48-SURFACE48
*Solid Section, elset=SURFACE48, material=MATERIAL-48
,
** Section: Section-49-SURFACE49
*Solid Section, elset=SURFACE49, material=MATERIAL-49
,
** Section: Section-50-SURFACE50
*Solid Section, elset=SURFACE50, material=MATERIAL-50
,
** Section: Section-51-SURFACE51
*Solid Section, elset=SURFACE51, material=MATERIAL-51
,
** Section: Section-52-SURFACE52
*Solid Section, elset=SURFACE52, material=MATERIAL-52
,
** Section: Section-53-SURFACE53
*Solid Section, elset=SURFACE53, material=MATERIAL-53
,
** Section: Section-54-SURFACE54
*Solid Section, elset=SURFACE54, material=MATERIAL-54
,
** Section: Section-55-SURFACE55
*Solid Section, elset=SURFACE55, material=MATERIAL-55
,
** Section: Section-56-SURFACE56
*Solid Section, elset=SURFACE56, material=MATERIAL-56
,
** Section: Section-57-SURFACE57
*Solid Section, elset=SURFACE57, material=MATERIAL-57
,
** Section: Section-58-SURFACE58
*Solid Section, elset=SURFACE58, material=MATERIAL-58
,
** Section: Section-59-SURFACE59
*Solid Section, elset=SURFACE59, material=MATERIAL-59
,
** Section: Section-60-SURFACE60
*Solid Section, elset=SURFACE60, material=MATERIAL-60
,
** Section: Section-61-SURFACE61
*Solid Section, elset=SURFACE61, material=MATERIAL-61
,
** Section: Section-62-SURFACE62
*Solid Section, elset=SURFACE62, material=MATERIAL-62
,
** Section: Section-63-SURFACE63
*Solid Section, elset=SURFACE63, material=MATERIAL-63
,
** Section: Section-64-SURFACE64
*Solid Section, elset=SURFACE64, material=MATERIAL-64
,
** Section: Section-65-SURFACE65
*Solid Section, elset=SURFACE65, material=MATERIAL-65
,
** Section: Section-66-SURFACE66
*Solid Section, elset=SURFACE66, material=MATERIAL-66
,
** Section: Section-67-SURFACE67
*Solid Section, elset=SURFACE67, material=MATERIAL-67
,
*End Part
**
**
** ASSEMBLY
**
*Assembly, name=Assembly
**
*Instance, name=SAMPLE-1, part=SAMPLE
*End Instance
**
*Node
      1,  0.899999976,         0.25
*Nset, nset=RP_SET-1
 1,
*Nset, nset=RP_SET-2, instance=SAMPLE-1
    1,    2,  107,  122,  125,  126
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*Nset, nset=SET-1, instance=SAMPLE-1
   29,   32,   48,   49,   92,  114
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*Nset, nset=SET-2, instance=SAMPLE-1
    1,    2,  107,  122,  125,  126
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*Nset, nset=SET-3, instance=SAMPLE-1
   24,   27,   45,   46,   48,   50
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*Nset, nset=SET-4, instance=SAMPLE-1
    1,    3,   29,   30,   60,   61
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*Nset, nset=SET-9
 1,
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*Nset, nset=RP_SET-2_CNS__CNS__CNS__CNS__CNS__CNS__CNS_, internal, instance=SAMPLE-1
    1,    2,  107,  122,  125,  126
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*Nset, nset=_PICKEDSET8, internal, instance=SAMPLE-1
   29,   32,   48,   49,   92,  114
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*Nset, nset=_PICKEDSET9, internal, instance=SAMPLE-1
    1,    2,  107,  122,  125,  126
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*Surface, type=NODE, name=RP_SET-2_CNS__CNS__CNS__CNS__CNS__CNS__CNS__CNS_, internal
RP_SET-2_CNS__CNS__CNS__CNS__CNS__CNS__CNS_, 1.
** Constraint: CONSTRAINT-1
*Coupling, constraint name=CONSTRAINT-1, ref node=RP_SET-1, surface=RP_SET-2_CNS__CNS__CNS__CNS__CNS__CNS__CNS__CNS_
*Kinematic
*End Assembly
**
** MATERIALS
**
*Material, name=MATERIAL-1
*Depvar
    150,
*User Material, constants=168, unsymm
266538.,   114000.,    76000.,        0.,        0.,        0.,        0.,        0.
        0.,        0.,        0.,        0.,        0.,        0.,        0.,        0.
        0.,        0.,        0.,        0.,        0.,        0.,        0.,        0.
        1.,        0.,        0.,        0.,        0.,        0.,        0.,        0.
        1.,        1.,        1.,        1.,        1.,        0.,        0.,        0.
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      225.,       10.,       80.,    25712.,        0.,        0.,        0.,        0.
*Material, name=MATERIAL-2
*Depvar
    150,
*User Material, constants=168, unsymm
266538.,   114000.,    76000.,        0.,        0.,        0.,        0.,        0.
        0.,        0.,        0.,        0.,        0.,        0.,        0.,        0.
        0.,        0.,        0.,        0.,        0.,        0.,        0.,        0.
        1.,        0.,        0.,        0.,        0.,        0.,        0.,        0.
        1.,        1.,        1.,        1.,        1.,        0.,        0.,        0.
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      360.,       10.,       40.,    25712.,        0.,        0.,        0.,        0.
*Material, name=MATERIAL-3
*Depvar
    150,
*User Material, constants=168, unsymm
266538.,   114000.,    76000.,        0.,        0.,        0.,        0.,        0.
        0.,        0.,        0.,        0.,        0.,        0.,        0.,        0.
        0.,        0.,        0.,        0.,        0.,        0.,        0.,        0.
        1.,        0.,        0.,        0.,        0.,        0.,        0.,        0.
        1.,        1.,        1.,        1.,        1.,        0.,        0.,        0.
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      225.,       50.,        0.,    25712.,        0.,        0.,        0.,        0.
*Material, name=MATERIAL-4
*Depvar
    150,
*User Material, constants=168, unsymm
266538.,  114000.,   76000.,       0.,       0.,       0.,       0.,       0.
       0.,       0.,       0.,       0.,       0.,       0.,       0.,       0.
       0.,       0.,       0.,       0.,       0.,       0.,       0.,       0.
       1.,       0.,       0.,       0.,       0.,       0.,       0.,       0.
       1.,       1.,       1.,       1.,       1.,       0.,       0.,       0.
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       0.,      30.,       0.,   25712.,       0.,       0.,       0.,       0.
*Material, name=MATERIAL-5
*Depvar
    150,
*User Material, constants=168, unsymm
266538.,  114000.,   76000.,       0.,       0.,       0.,       0.,       0.
       0.,       0.,       0.,       0.,       0.,       0.,       0.,       0.
       0.,       0.,       0.,       0.,       0.,       0.,       0.,       0.
       1.,       0.,       0.,       0.,       0.,       0.,       0.,       0.
       1.,       1.,       1.,       1.,       1.,       0.,       0.,       0.
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       0.,       0.,      20.,   25712.,       0.,       0.,       0.,       0.
*Material, name=MATERIAL-6
*Depvar
    150,
*User Material, constants=168, unsymm
266538.,  114000.,   76000.,       0.,       0.,       0.,       0.,       0.
       0.,       0.,       0.,       0.,       0.,       0.,       0.,       0.
       0.,       0.,       0.,       0.,       0.,       0.,       0.,       0.
       1.,       0.,       0.,       0.,       0.,       0.,       0.,       0.
       1.,       1.,       1.,       1.,       1.,       0.,       0.,       0.
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      45.,       0.,       0.,   25712.,       0.,       0.,       0.,       0.
*Material, name=MATERIAL-7
*Depvar
    150,
*User Material, constants=168, unsymm
266538.,   114000.,    76000.,        0.,        0.,        0.,        0.,        0.
        0.,        0.,        0.,        0.,        0.,        0.,        0.,        0.
        0.,        0.,        0.,        0.,        0.,        0.,        0.,        0.
        1.,        0.,        0.,        0.,        0.,        0.,        0.,        0.
        1.,        1.,        1.,        1.,        1.,        0.,        0.,        0.
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      315.,       50.,       20.,    25712.,        0.,        0.,        0.,        0.
*Material, name=MATERIAL-8
*Depvar
    150,
*User Material, constants=168, unsymm
266538.,   114000.,    76000.,        0.,        0.,        0.,        0.,        0.
        0.,        0.,        0.,        0.,        0.,        0.,        0.,        0.
        0.,        0.,        0.,        0.,        0.,        0.,        0.,        0.
        1.,        0.,        0.,        0.,        0.,        0.,        0.,        0.
        1.,        1.,        1.,        1.,        1.,        0.,        0.,        0.
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      270.,       50.,       60.,    25712.,        0.,        0.,        0.,        0.
*Material, name=MATERIAL-9
*Depvar
    150,
*User Material, constants=168, unsymm
266538.,   114000.,    76000.,        0.,        0.,        0.,        0.,        0.
        0.,        0.,        0.,        0.,        0.,        0.,        0.,        0.
        0.,        0.,        0.,        0.,        0.,        0.,        0.,        0.
        1.,        0.,        0.,        0.,        0.,        0.,        0.,        0.
        1.,        1.,        1.,        1.,        1.,        0.,        0.,        0.
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       90.,       40.,       20.,    25712.,        0.,        0.,        0.,        0.
*Material, name=MATERIAL-10
*Depvar
    150,
*User Material, constants=168, unsymm
266538.,   114000.,    76000.,        0.,        0.,        0.,        0.,        0.
        0.,        0.,        0.,        0.,        0.,        0.,        0.,        0.
        0.,        0.,        0.,        0.,        0.,        0.,        0.,        0.
        1.,        0.,        0.,        0.,        0.,        0.,        0.,        0.
        1.,        1.,        1.,        1.,        1.,        0.,        0.,        0.
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      180.,       50.,       20.,    25712.,        0.,        0.,        0.,        0.
*Material, name=MATERIAL-11
*Depvar
    150,
*User Material, constants=168, unsymm
266538.,   114000.,    76000.,        0.,        0.,        0.,        0.,        0.
        0.,        0.,        0.,        0.,        0.,        0.,        0.,        0.
        0.,        0.,        0.,        0.,        0.,        0.,        0.,        0.
        1.,        0.,        0.,        0.,        0.,        0.,        0.,        0.
        1.,        1.,        1.,        1.,        1.,        0.,        0.,        0.
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      225.,       20.,       80.,    25712.,        0.,        0.,        0.,        0.
*Material, name=MATERIAL-12
*Depvar
    150,
*User Material, constants=168, unsymm
266538.,   114000.,    76000.,        0.,        0.,        0.,        0.,        0.
        0.,        0.,        0.,        0.,        0.,        0.,        0.,        0.
        0.,        0.,        0.,        0.,        0.,        0.,        0.,        0.
        1.,        0.,        0.,        0.,        0.,        0.,        0.,        0.
        1.,        1.,        1.,        1.,        1.,        0.,        0.,        0.
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       90.,       40.,       80.,    25712.,        0.,        0.,        0.,        0.
*Material, name=MATERIAL-13
*Depvar
    150,
*User Material, constants=168, unsymm
266538.,  114000.,   76000.,       0.,       0.,       0.,       0.,       0.
       0.,       0.,       0.,       0.,       0.,       0.,       0.,       0.
       0.,       0.,       0.,       0.,       0.,       0.,       0.,       0.
       1.,       0.,       0.,       0.,       0.,       0.,       0.,       0.
       1.,       1.,       1.,       1.,       1.,       0.,       0.,       0.
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     180.,      30.,      60.,   25712.,       0.,       0.,       0.,       0.
*Material, name=MATERIAL-14
*Depvar
    150,
*User Material, constants=168, unsymm
266538.,  114000.,   76000.,       0.,       0.,       0.,       0.,       0.
       0.,       0.,       0.,       0.,       0.,       0.,       0.,       0.
       0.,       0.,       0.,       0.,       0.,       0.,       0.,       0.
       1.,       0.,       0.,       0.,       0.,       0.,       0.,       0.
       1.,       1.,       1.,       1.,       1.,       0.,       0.,       0.
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      90.,      50.,       0.,   25712.,       0.,       0.,       0.,       0.
*Material, name=MATERIAL-15
*Depvar
    150,
*User Material, constants=168, unsymm
266538.,  114000.,   76000.,       0.,       0.,       0.,       0.,       0.
       0.,       0.,       0.,       0.,       0.,       0.,       0.,       0.
       0.,       0.,       0.,       0.,       0.,       0.,       0.,       0.
       1.,       0.,       0.,       0.,       0.,       0.,       0.,       0.
       1.,       1.,       1.,       1.,       1.,       0.,       0.,       0.
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     180.,      30.,      60.,   25712.,       0.,       0.,       0.,       0.
*Material, name=MATERIAL-16
*Depvar
    150,
*User Material, constants=168, unsymm
266538.,   114000.,    76000.,        0.,        0.,        0.,        0.,        0.
        0.,        0.,        0.,        0.,        0.,        0.,        0.,        0.
        0.,        0.,        0.,        0.,        0.,        0.,        0.,        0.
        1.,        0.,        0.,        0.,        0.,        0.,        0.,        0.
        1.,        1.,        1.,        1.,        1.,        0.,        0.,        0.
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      315.,       50.,        0.,    25712.,        0.,        0.,        0.,        0.
*Material, name=MATERIAL-17
*Depvar
    150,
*User Material, constants=168, unsymm
266538.,  114000.,   76000.,       0.,       0.,       0.,       0.,       0.
       0.,       0.,       0.,       0.,       0.,       0.,       0.,       0.
       0.,       0.,       0.,       0.,       0.,       0.,       0.,       0.
       1.,       0.,       0.,       0.,       0.,       0.,       0.,       0.
       1.,       1.,       1.,       1.,       1.,       0.,       0.,       0.
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     315.,       0.,      60.,   25712.,       0.,       0.,       0.,       0.
*Material, name=MATERIAL-18
*Depvar
    150,
*User Material, constants=168, unsymm
266538.,   114000.,    76000.,        0.,        0.,        0.,        0.,        0.
        0.,        0.,        0.,        0.,        0.,        0.,        0.,        0.
        0.,        0.,        0.,        0.,        0.,        0.,        0.,        0.
        1.,        0.,        0.,        0.,        0.,        0.,        0.,        0.
        1.,        1.,        1.,        1.,        1.,        0.,        0.,        0.
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       45.,       30.,       20.,    25712.,        0.,        0.,        0.,        0.
*Material, name=MATERIAL-19
*Depvar
    150,
*User Material, constants=168, unsymm
266538.,   114000.,    76000.,        0.,        0.,        0.,        0.,        0.
        0.,        0.,        0.,        0.,        0.,        0.,        0.,        0.
        0.,        0.,        0.,        0.,        0.,        0.,        0.,        0.
        1.,        0.,        0.,        0.,        0.,        0.,        0.,        0.
        1.,        1.,        1.,        1.,        1.,        0.,        0.,        0.
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      315.,       40.,       40.,    25712.,        0.,        0.,        0.,        0.
*Material, name=MATERIAL-20
*Depvar
    150,
*User Material, constants=168, unsymm
266538.,  114000.,   76000.,       0.,       0.,       0.,       0.,       0.
       0.,       0.,       0.,       0.,       0.,       0.,       0.,       0.
       0.,       0.,       0.,       0.,       0.,       0.,       0.,       0.
       1.,       0.,       0.,       0.,       0.,       0.,       0.,       0.
       1.,       1.,       1.,       1.,       1.,       0.,       0.,       0.
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       0.,      30.,      80.,   25712.,       0.,       0.,       0.,       0.
*Material, name=MATERIAL-21
*Depvar
    150,
*User Material, constants=168, unsymm
266538.,   114000.,    76000.,        0.,        0.,        0.,        0.,        0.
        0.,        0.,        0.,        0.,        0.,        0.,        0.,        0.
        0.,        0.,        0.,        0.,        0.,        0.,        0.,        0.
        1.,        0.,        0.,        0.,        0.,        0.,        0.,        0.
        1.,        1.,        1.,        1.,        1.,        0.,        0.,        0.
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      270.,       40.,        0.,    25712.,        0.,        0.,        0.,        0.
*Material, name=MATERIAL-22
*Depvar
    150,
*User Material, constants=168, unsymm
266538.,   114000.,    76000.,        0.,        0.,        0.,        0.,        0.
        0.,        0.,        0.,        0.,        0.,        0.,        0.,        0.
        0.,        0.,        0.,        0.,        0.,        0.,        0.,        0.
        1.,        0.,        0.,        0.,        0.,        0.,        0.,        0.
        1.,        1.,        1.,        1.,        1.,        0.,        0.,        0.
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      315.,       40.,        0.,    25712.,        0.,        0.,        0.,        0.
*Material, name=MATERIAL-23
*Depvar
    150,
*User Material, constants=168, unsymm
266538.,   114000.,    76000.,        0.,        0.,        0.,        0.,        0.
        0.,        0.,        0.,        0.,        0.,        0.,        0.,        0.
        0.,        0.,        0.,        0.,        0.,        0.,        0.,        0.
        1.,        0.,        0.,        0.,        0.,        0.,        0.,        0.
        1.,        1.,        1.,        1.,        1.,        0.,        0.,        0.
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      270.,       50.,       60.,    25712.,        0.,        0.,        0.,        0.
*Material, name=MATERIAL-24
*Depvar
    150,
*User Material, constants=168, unsymm
266538.,   114000.,    76000.,        0.,        0.,        0.,        0.,        0.
        0.,        0.,        0.,        0.,        0.,        0.,        0.,        0.
        0.,        0.,        0.,        0.,        0.,        0.,        0.,        0.
        1.,        0.,        0.,        0.,        0.,        0.,        0.,        0.
        1.,        1.,        1.,        1.,        1.,        0.,        0.,        0.
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       45.,       40.,       20.,    25712.,        0.,        0.,        0.,        0.
*Material, name=MATERIAL-25
*Depvar
    150,
*User Material, constants=168, unsymm
266538.,   114000.,    76000.,        0.,        0.,        0.,        0.,        0.
        0.,        0.,        0.,        0.,        0.,        0.,        0.,        0.
        0.,        0.,        0.,        0.,        0.,        0.,        0.,        0.
        1.,        0.,        0.,        0.,        0.,        0.,        0.,        0.
        1.,        1.,        1.,        1.,        1.,        0.,        0.,        0.
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        0.,       10.,       20.,    25712.,        0.,        0.,        0.,        0.
*Material, name=MATERIAL-26
*Depvar
    150,
*User Material, constants=168, unsymm
266538.,  114000.,   76000.,       0.,       0.,       0.,       0.,       0.
       0.,       0.,       0.,       0.,       0.,       0.,       0.,       0.
       0.,       0.,       0.,       0.,       0.,       0.,       0.,       0.
       1.,       0.,       0.,       0.,       0.,       0.,       0.,       0.
       1.,       1.,       1.,       1.,       1.,       0.,       0.,       0.
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      45.,       0.,       0.,   25712.,       0.,       0.,       0.,       0.
*Material, name=MATERIAL-27
*Depvar
    150,
*User Material, constants=168, unsymm
266538.,   114000.,    76000.,        0.,        0.,        0.,        0.,        0.
        0.,        0.,        0.,        0.,        0.,        0.,        0.,        0.
        0.,        0.,        0.,        0.,        0.,        0.,        0.,        0.
        1.,        0.,        0.,        0.,        0.,        0.,        0.,        0.
        1.,        1.,        1.,        1.,        1.,        0.,        0.,        0.
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      360.,       40.,        0.,    25712.,        0.,        0.,        0.,        0.
*Material, name=MATERIAL-28
*Depvar
    150,
*User Material, constants=168, unsymm
266538.,  114000.,   76000.,       0.,       0.,       0.,       0.,       0.
       0.,       0.,       0.,       0.,       0.,       0.,       0.,       0.
       0.,       0.,       0.,       0.,       0.,       0.,       0.,       0.
       1.,       0.,       0.,       0.,       0.,       0.,       0.,       0.
       1.,       1.,       1.,       1.,       1.,       0.,       0.,       0.
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     360.,      20.,      80.,   25712.,       0.,       0.,       0.,       0.
*Material, name=MATERIAL-29
*Depvar
    150,
*User Material, constants=168, unsymm
266538.,   114000.,    76000.,        0.,        0.,        0.,        0.,        0.
        0.,        0.,        0.,        0.,        0.,        0.,        0.,        0.
        0.,        0.,        0.,        0.,        0.,        0.,        0.,        0.
        1.,        0.,        0.,        0.,        0.,        0.,        0.,        0.
        1.,        1.,        1.,        1.,        1.,        0.,        0.,        0.
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      135.,        0.,       40.,    25712.,        0.,        0.,        0.,        0.
*Material, name=MATERIAL-30
*Depvar
    150,
*User Material, constants=168, unsymm
266538.,   114000.,    76000.,        0.,        0.,        0.,        0.,        0.
        0.,        0.,        0.,        0.,        0.,        0.,        0.,        0.
        0.,        0.,        0.,        0.,        0.,        0.,        0.,        0.
        1.,        0.,        0.,        0.,        0.,        0.,        0.,        0.
        1.,        1.,        1.,        1.,        1.,        0.,        0.,        0.
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      360.,       50.,       60.,    25712.,        0.,        0.,        0.,        0.
*Material, name=MATERIAL-31
*Depvar
    150,
*User Material, constants=168, unsymm
266538.,   114000.,    76000.,        0.,        0.,        0.,        0.,        0.
        0.,        0.,        0.,        0.,        0.,        0.,        0.,        0.
        0.,        0.,        0.,        0.,        0.,        0.,        0.,        0.
        1.,        0.,        0.,        0.,        0.,        0.,        0.,        0.
        1.,        1.,        1.,        1.,        1.,        0.,        0.,        0.
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      315.,       20.,       80.,    25712.,        0.,        0.,        0.,        0.
*Material, name=MATERIAL-32
*Depvar
    150,
*User Material, constants=168, unsymm
266538.,   114000.,    76000.,        0.,        0.,        0.,        0.,        0.
        0.,        0.,        0.,        0.,        0.,        0.,        0.,        0.
        0.,        0.,        0.,        0.,        0.,        0.,        0.,        0.
        1.,        0.,        0.,        0.,        0.,        0.,        0.,        0.
        1.,        1.,        1.,        1.,        1.,        0.,        0.,        0.
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      135.,       40.,       40.,    25712.,        0.,        0.,        0.,        0.
*Material, name=MATERIAL-33
*Depvar
    150,
*User Material, constants=168, unsymm
266538.,   114000.,    76000.,        0.,        0.,        0.,        0.,        0.
        0.,        0.,        0.,        0.,        0.,        0.,        0.,        0.
        0.,        0.,        0.,        0.,        0.,        0.,        0.,        0.
        1.,        0.,        0.,        0.,        0.,        0.,        0.,        0.
        1.,        1.,        1.,        1.,        1.,        0.,        0.,        0.
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      270.,       10.,        0.,    25712.,        0.,        0.,        0.,        0.
*Material, name=MATERIAL-34
*Depvar
    150,
*User Material, constants=168, unsymm
266538.,   114000.,    76000.,        0.,        0.,        0.,        0.,        0.
        0.,        0.,        0.,        0.,        0.,        0.,        0.,        0.
        0.,        0.,        0.,        0.,        0.,        0.,        0.,        0.
        1.,        0.,        0.,        0.,        0.,        0.,        0.,        0.
        1.,        1.,        1.,        1.,        1.,        0.,        0.,        0.
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      225.,       10.,       60.,    25712.,        0.,        0.,        0.,        0.
*Material, name=MATERIAL-35
*Depvar
    150,
*User Material, constants=168, unsymm
266538.,   114000.,    76000.,        0.,        0.,        0.,        0.,        0.
        0.,        0.,        0.,        0.,        0.,        0.,        0.,        0.
        0.,        0.,        0.,        0.,        0.,        0.,        0.,        0.
        1.,        0.,        0.,        0.,        0.,        0.,        0.,        0.
        1.,        1.,        1.,        1.,        1.,        0.,        0.,        0.
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       45.,        0.,       60.,    25712.,        0.,        0.,        0.,        0.
*Material, name=MATERIAL-36
*Depvar
    150,
*User Material, constants=168, unsymm
266538.,   114000.,    76000.,        0.,        0.,        0.,        0.,        0.
        0.,        0.,        0.,        0.,        0.,        0.,        0.,        0.
        0.,        0.,        0.,        0.,        0.,        0.,        0.,        0.
        1.,        0.,        0.,        0.,        0.,        0.,        0.,        0.
        1.,        1.,        1.,        1.,        1.,        0.,        0.,        0.
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      135.,       20.,       20.,    25712.,        0.,        0.,        0.,        0.
*Material, name=MATERIAL-37
*Depvar
    150,
*User Material, constants=168, unsymm
266538.,   114000.,    76000.,        0.,        0.,        0.,        0.,        0.
        0.,        0.,        0.,        0.,        0.,        0.,        0.,        0.
        0.,        0.,        0.,        0.,        0.,        0.,        0.,        0.
        1.,        0.,        0.,        0.,        0.,        0.,        0.,        0.
        1.,        1.,        1.,        1.,        1.,        0.,        0.,        0.
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      180.,       40.,       40.,    25712.,        0.,        0.,        0.,        0.
*Material, name=MATERIAL-38
*Depvar
    150,
*User Material, constants=168, unsymm
266538.,   114000.,    76000.,        0.,        0.,        0.,        0.,        0.
        0.,        0.,        0.,        0.,        0.,        0.,        0.,        0.
        0.,        0.,        0.,        0.,        0.,        0.,        0.,        0.
        1.,        0.,        0.,        0.,        0.,        0.,        0.,        0.
        1.,        1.,        1.,        1.,        1.,        0.,        0.,        0.
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      360.,       40.,       80.,    25712.,        0.,        0.,        0.,        0.
*Material, name=MATERIAL-39
*Depvar
    150,
*User Material, constants=168, unsymm
266538.,   114000.,    76000.,        0.,        0.,        0.,        0.,        0.
        0.,        0.,        0.,        0.,        0.,        0.,        0.,        0.
        0.,        0.,        0.,        0.,        0.,        0.,        0.,        0.
        1.,        0.,        0.,        0.,        0.,        0.,        0.,        0.
        1.,        1.,        1.,        1.,        1.,        0.,        0.,        0.
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       45.,        0.,       60.,    25712.,        0.,        0.,        0.,        0.
*Material, name=MATERIAL-40
*Depvar
    150,
*User Material, constants=168, unsymm
266538.,  114000.,   76000.,       0.,       0.,       0.,       0.,       0.
       0.,       0.,       0.,       0.,       0.,       0.,       0.,       0.
       0.,       0.,       0.,       0.,       0.,       0.,       0.,       0.
       1.,       0.,       0.,       0.,       0.,       0.,       0.,       0.
       1.,       1.,       1.,       1.,       1.,       0.,       0.,       0.
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     180.,      40.,       0.,   25712.,       0.,       0.,       0.,       0.
*Material, name=MATERIAL-41
*Depvar
    150,
*User Material, constants=168, unsymm
266538.,   114000.,    76000.,        0.,        0.,        0.,        0.,        0.
        0.,        0.,        0.,        0.,        0.,        0.,        0.,        0.
        0.,        0.,        0.,        0.,        0.,        0.,        0.,        0.
        1.,        0.,        0.,        0.,        0.,        0.,        0.,        0.
        1.,        1.,        1.,        1.,        1.,        0.,        0.,        0.
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        0.,       10.,        0.,    25712.,        0.,        0.,        0.,        0.
*Material, name=MATERIAL-42
*Depvar
    150,
*User Material, constants=168, unsymm
266538.,   114000.,    76000.,        0.,        0.,        0.,        0.,        0.
        0.,        0.,        0.,        0.,        0.,        0.,        0.,        0.
        0.,        0.,        0.,        0.,        0.,        0.,        0.,        0.
        1.,        0.,        0.,        0.,        0.,        0.,        0.,        0.
        1.,        1.,        1.,        1.,        1.,        0.,        0.,        0.
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      135.,       40.,       80.,    25712.,        0.,        0.,        0.,        0.
*Material, name=MATERIAL-43
*Depvar
    150,
*User Material, constants=168, unsymm
266538.,   114000.,    76000.,        0.,        0.,        0.,        0.,        0.
        0.,        0.,        0.,        0.,        0.,        0.,        0.,        0.
        0.,        0.,        0.,        0.,        0.,        0.,        0.,        0.
        1.,        0.,        0.,        0.,        0.,        0.,        0.,        0.
        1.,        1.,        1.,        1.,        1.,        0.,        0.,        0.
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       90.,       10.,       40.,    25712.,        0.,        0.,        0.,        0.
*Material, name=MATERIAL-44
*Depvar
    150,
*User Material, constants=168, unsymm
266538.,  114000.,   76000.,       0.,       0.,       0.,       0.,       0.
       0.,       0.,       0.,       0.,       0.,       0.,       0.,       0.
       0.,       0.,       0.,       0.,       0.,       0.,       0.,       0.
       1.,       0.,       0.,       0.,       0.,       0.,       0.,       0.
       1.,       1.,       1.,       1.,       1.,       0.,       0.,       0.
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       0.,       0.,      80.,   25712.,       0.,       0.,       0.,       0.
*Material, name=MATERIAL-45
*Depvar
    150,
*User Material, constants=168, unsymm
266538.,   114000.,    76000.,        0.,        0.,        0.,        0.,        0.
        0.,        0.,        0.,        0.,        0.,        0.,        0.,        0.
        0.,        0.,        0.,        0.,        0.,        0.,        0.,        0.
        1.,        0.,        0.,        0.,        0.,        0.,        0.,        0.
        1.,        1.,        1.,        1.,        1.,        0.,        0.,        0.
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      180.,       20.,       40.,    25712.,        0.,        0.,        0.,        0.
*Material, name=MATERIAL-46
*Depvar
    150,
*User Material, constants=168, unsymm
266538.,  114000.,   76000.,       0.,       0.,       0.,       0.,       0.
       0.,       0.,       0.,       0.,       0.,       0.,       0.,       0.
       0.,       0.,       0.,       0.,       0.,       0.,       0.,       0.
       1.,       0.,       0.,       0.,       0.,       0.,       0.,       0.
       1.,       1.,       1.,       1.,       1.,       0.,       0.,       0.
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      90.,      30.,       0.,   25712.,       0.,       0.,       0.,       0.
*Material, name=MATERIAL-47
*Depvar
    150,
*User Material, constants=168, unsymm
266538.,   114000.,    76000.,        0.,        0.,        0.,        0.,        0.
        0.,        0.,        0.,        0.,        0.,        0.,        0.,        0.
        0.,        0.,        0.,        0.,        0.,        0.,        0.,        0.
        1.,        0.,        0.,        0.,        0.,        0.,        0.,        0.
        1.,        1.,        1.,        1.,        1.,        0.,        0.,        0.
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      315.,       10.,       60.,    25712.,        0.,        0.,        0.,        0.
*Material, name=MATERIAL-48
*Depvar
    150,
*User Material, constants=168, unsymm
266538.,   114000.,    76000.,        0.,        0.,        0.,        0.,        0.
        0.,        0.,        0.,        0.,        0.,        0.,        0.,        0.
        0.,        0.,        0.,        0.,        0.,        0.,        0.,        0.
        1.,        0.,        0.,        0.,        0.,        0.,        0.,        0.
        1.,        1.,        1.,        1.,        1.,        0.,        0.,        0.
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      315.,       20.,        0.,    25712.,        0.,        0.,        0.,        0.
*Material, name=MATERIAL-49
*Depvar
    150,
*User Material, constants=168, unsymm
266538.,   114000.,    76000.,        0.,        0.,        0.,        0.,        0.
        0.,        0.,        0.,        0.,        0.,        0.,        0.,        0.
        0.,        0.,        0.,        0.,        0.,        0.,        0.,        0.
        1.,        0.,        0.,        0.,        0.,        0.,        0.,        0.
        1.,        1.,        1.,        1.,        1.,        0.,        0.,        0.
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      360.,       40.,        0.,    25712.,        0.,        0.,        0.,        0.
*Material, name=MATERIAL-50
*Depvar
    150,
*User Material, constants=168, unsymm
266538.,   114000.,    76000.,        0.,        0.,        0.,        0.,        0.
        0.,        0.,        0.,        0.,        0.,        0.,        0.,        0.
        0.,        0.,        0.,        0.,        0.,        0.,        0.,        0.
        1.,        0.,        0.,        0.,        0.,        0.,        0.,        0.
        1.,        1.,        1.,        1.,        1.,        0.,        0.,        0.
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      270.,       40.,       80.,    25712.,        0.,        0.,        0.,        0.
*Material, name=MATERIAL-51
*Depvar
    150,
*User Material, constants=168, unsymm
266538.,   114000.,    76000.,        0.,        0.,        0.,        0.,        0.
        0.,        0.,        0.,        0.,        0.,        0.,        0.,        0.
        0.,        0.,        0.,        0.,        0.,        0.,        0.,        0.
        1.,        0.,        0.,        0.,        0.,        0.,        0.,        0.
        1.,        1.,        1.,        1.,        1.,        0.,        0.,        0.
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      135.,       20.,       40.,    25712.,        0.,        0.,        0.,        0.
*Material, name=MATERIAL-52
*Depvar
    150,
*User Material, constants=168, unsymm
266538.,   114000.,    76000.,        0.,        0.,        0.,        0.,        0.
        0.,        0.,        0.,        0.,        0.,        0.,        0.,        0.
        0.,        0.,        0.,        0.,        0.,        0.,        0.,        0.
        1.,        0.,        0.,        0.,        0.,        0.,        0.,        0.
        1.,        1.,        1.,        1.,        1.,        0.,        0.,        0.
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      315.,       20.,       20.,    25712.,        0.,        0.,        0.,        0.
*Material, name=MATERIAL-53
*Depvar
    150,
*User Material, constants=168, unsymm
266538.,   114000.,    76000.,        0.,        0.,        0.,        0.,        0.
        0.,        0.,        0.,        0.,        0.,        0.,        0.,        0.
        0.,        0.,        0.,        0.,        0.,        0.,        0.,        0.
        1.,        0.,        0.,        0.,        0.,        0.,        0.,        0.
        1.,        1.,        1.,        1.,        1.,        0.,        0.,        0.
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      315.,        0.,        0.,    25712.,        0.,        0.,        0.,        0.
*Material, name=MATERIAL-54
*Depvar
    150,
*User Material, constants=168, unsymm
266538.,   114000.,    76000.,        0.,        0.,        0.,        0.,        0.
        0.,        0.,        0.,        0.,        0.,        0.,        0.,        0.
        0.,        0.,        0.,        0.,        0.,        0.,        0.,        0.
        1.,        0.,        0.,        0.,        0.,        0.,        0.,        0.
        1.,        1.,        1.,        1.,        1.,        0.,        0.,        0.
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      180.,       10.,       80.,    25712.,        0.,        0.,        0.,        0.
*Material, name=MATERIAL-55
*Depvar
    150,
*User Material, constants=168, unsymm
266538.,   114000.,    76000.,        0.,        0.,        0.,        0.,        0.
        0.,        0.,        0.,        0.,        0.,        0.,        0.,        0.
        0.,        0.,        0.,        0.,        0.,        0.,        0.,        0.
        1.,        0.,        0.,        0.,        0.,        0.,        0.,        0.
        1.,        1.,        1.,        1.,        1.,        0.,        0.,        0.
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      225.,       20.,       60.,    25712.,        0.,        0.,        0.,        0.
*Material, name=MATERIAL-56
*Depvar
    150,
*User Material, constants=168, unsymm
266538.,   114000.,    76000.,        0.,        0.,        0.,        0.,        0.
        0.,        0.,        0.,        0.,        0.,        0.,        0.,        0.
        0.,        0.,        0.,        0.,        0.,        0.,        0.,        0.
        1.,        0.,        0.,        0.,        0.,        0.,        0.,        0.
        1.,        1.,        1.,        1.,        1.,        0.,        0.,        0.
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      135.,       20.,        0.,    25712.,        0.,        0.,        0.,        0.
*Material, name=MATERIAL-57
*Depvar
    150,
*User Material, constants=168, unsymm
266538.,   114000.,    76000.,        0.,        0.,        0.,        0.,        0.
        0.,        0.,        0.,        0.,        0.,        0.,        0.,        0.
        0.,        0.,        0.,        0.,        0.,        0.,        0.,        0.
        1.,        0.,        0.,        0.,        0.,        0.,        0.,        0.
        1.,        1.,        1.,        1.,        1.,        0.,        0.,        0.
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      270.,        0.,       20.,    25712.,        0.,        0.,        0.,        0.
*Material, name=MATERIAL-58
*Depvar
    150,
*User Material, constants=168, unsymm
266538.,   114000.,    76000.,        0.,        0.,        0.,        0.,        0.
        0.,        0.,        0.,        0.,        0.,        0.,        0.,        0.
        0.,        0.,        0.,        0.,        0.,        0.,        0.,        0.
        1.,        0.,        0.,        0.,        0.,        0.,        0.,        0.
        1.,        1.,        1.,        1.,        1.,        0.,        0.,        0.
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      360.,       50.,       40.,    25712.,        0.,        0.,        0.,        0.
*Material, name=MATERIAL-59
*Depvar
    150,
*User Material, constants=168, unsymm
266538.,   114000.,    76000.,        0.,        0.,        0.,        0.,        0.
        0.,        0.,        0.,        0.,        0.,        0.,        0.,        0.
        0.,        0.,        0.,        0.,        0.,        0.,        0.,        0.
        1.,        0.,        0.,        0.,        0.,        0.,        0.,        0.
        1.,        1.,        1.,        1.,        1.,        0.,        0.,        0.
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        0.,       10.,       80.,    25712.,        0.,        0.,        0.,        0.
*Material, name=MATERIAL-60
*Depvar
    150,
*User Material, constants=168, unsymm
266538.,   114000.,    76000.,        0.,        0.,        0.,        0.,        0.
        0.,        0.,        0.,        0.,        0.,        0.,        0.,        0.
        0.,        0.,        0.,        0.,        0.,        0.,        0.,        0.
        1.,        0.,        0.,        0.,        0.,        0.,        0.,        0.
        1.,        1.,        1.,        1.,        1.,        0.,        0.,        0.
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       90.,       20.,       80.,    25712.,        0.,        0.,        0.,        0.
*Material, name=MATERIAL-61
*Depvar
    150,
*User Material, constants=168, unsymm
266538.,   114000.,    76000.,        0.,        0.,        0.,        0.,        0.
        0.,        0.,        0.,        0.,        0.,        0.,        0.,        0.
        0.,        0.,        0.,        0.,        0.,        0.,        0.,        0.
        1.,        0.,        0.,        0.,        0.,        0.,        0.,        0.
        1.,        1.,        1.,        1.,        1.,        0.,        0.,        0.
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      315.,       40.,       60.,    25712.,        0.,        0.,        0.,        0.
*Material, name=MATERIAL-62
*Depvar
    150,
*User Material, constants=168, unsymm
266538.,  114000.,   76000.,       0.,       0.,       0.,       0.,       0.
       0.,       0.,       0.,       0.,       0.,       0.,       0.,       0.
       0.,       0.,       0.,       0.,       0.,       0.,       0.,       0.
       1.,       0.,       0.,       0.,       0.,       0.,       0.,       0.
       1.,       1.,       1.,       1.,       1.,       0.,       0.,       0.
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     315.,       0.,      60.,   25712.,       0.,       0.,       0.,       0.
*Material, name=MATERIAL-63
*Depvar
    150,
*User Material, constants=168, unsymm
266538.,   114000.,    76000.,        0.,        0.,        0.,        0.,        0.
        0.,        0.,        0.,        0.,        0.,        0.,        0.,        0.
        0.,        0.,        0.,        0.,        0.,        0.,        0.,        0.
        1.,        0.,        0.,        0.,        0.,        0.,        0.,        0.
        1.,        1.,        1.,        1.,        1.,        0.,        0.,        0.
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      315.,       50.,       60.,    25712.,        0.,        0.,        0.,        0.
*Material, name=MATERIAL-64
*Depvar
    150,
*User Material, constants=168, unsymm
266538.,   114000.,    76000.,        0.,        0.,        0.,        0.,        0.
        0.,        0.,        0.,        0.,        0.,        0.,        0.,        0.
        0.,        0.,        0.,        0.,        0.,        0.,        0.,        0.
        1.,        0.,        0.,        0.,        0.,        0.,        0.,        0.
        1.,        1.,        1.,        1.,        1.,        0.,        0.,        0.
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      135.,       50.,       60.,    25712.,        0.,        0.,        0.,        0.
*Material, name=MATERIAL-65
*Depvar
    150,
*User Material, constants=168, unsymm
266538.,   114000.,    76000.,        0.,        0.,        0.,        0.,        0.
        0.,        0.,        0.,        0.,        0.,        0.,        0.,        0.
        0.,        0.,        0.,        0.,        0.,        0.,        0.,        0.
        1.,        0.,        0.,        0.,        0.,        0.,        0.,        0.
        1.,        1.,        1.,        1.,        1.,        0.,        0.,        0.
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        0.,       10.,       40.,    25712.,        0.,        0.,        0.,        0.
*Material, name=MATERIAL-66
*Depvar
    150,
*User Material, constants=168, unsymm
266538.,  114000.,   76000.,       0.,       0.,       0.,       0.,       0.
       0.,       0.,       0.,       0.,       0.,       0.,       0.,       0.
       0.,       0.,       0.,       0.,       0.,       0.,       0.,       0.
       1.,       0.,       0.,       0.,       0.,       0.,       0.,       0.
       1.,       1.,       1.,       1.,       1.,       0.,       0.,       0.
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     360.,      20.,      60.,   25712.,       0.,       0.,       0.,       0.
*Material, name=MATERIAL-67
*Depvar
    150,
*User Material, constants=168, unsymm
266538.,   114000.,    76000.,        0.,        0.,        0.,        0.,        0.
        0.,        0.,        0.,        0.,        0.,        0.,        0.,        0.
        0.,        0.,        0.,        0.,        0.,        0.,        0.,        0.
        1.,        0.,        0.,        0.,        0.,        0.,        0.,        0.
        1.,        1.,        1.,        1.,        1.,        0.,        0.,        0.
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      315.,       10.,       60.,    25712.,        0.,        0.,        0.,        0.
** ----------------------------------------------------------------
**
** STEP: Step-1
**
*Step, name=Step-1, nlgeom=YES, inc=500
*Static
0.01, 1., 1e-05, 1.
**
** BOUNDARY CONDITIONS
**
** Name: Disp-BC-1 Type: Displacement/Rotation
*Boundary
SET-9, 1, 1, 0.1
** Name: Disp-BC-2 Type: Displacement/Rotation
*Boundary
_PICKEDSET8, 1, 1
**
** OUTPUT REQUESTS
**
*Restart, write, frequency=0
**
** FIELD OUTPUT: F-Output-1
**
*Output, field
*Element Output, directions=YES
E, LE, MISES, S
**
** HISTORY OUTPUT: H-Output-1
**
*Output, history
*Node Output, nset=RP_SET-1
RF1, U1
*End Step
